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sin(3.12) = 0.021591
12! = 479001600
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sum(2*i, i = 8 .. 32) = 1000
product(k, k = 1 .. 4) = 24
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A1 := [1, 6, 4; 3, -8, 77]
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k := 0
s1 := sum(A1[k, i], i = 0 .. 2)
s1 = 11
